// SBML level 2 version 4

model Test_enz()
  // Test enz

  // Compartments:
  compartment Cell_body = 1;

  // Species:
  species AllGolf in Cell_body;
  species AllGi in Cell_body;
  species $ATP in Cell_body = 2000;
  species cAMP in Cell_body = 0;
  species AMP in Cell_body = 0;
  species PDE in Cell_body = 1.2;
  species actAC in Cell_body = 0.05;
  species DA in Cell_body = 0;
  species BuffDA in Cell_body = 2;
  species DA_BuffDA in Cell_body = 0;
  species D1R in Cell_body = 0.6;
  species DA_D1R in Cell_body = 0;
  species D2R in Cell_body = 0;
  species A2AR in Cell_body = 0;
  species DA_D2R in Cell_body = 0;
  species DA_basalB in Cell_body = 0;
  species $DA_basal in Cell_body = 0;
  species Gbc in Cell_body = 9;
  species Golf_Gbc in Cell_body = 15;
  species Golf_GDP in Cell_body = 0;
  species Golf_GTP in Cell_body = 0;
  species Gi_GDP in Cell_body = 0;
  species Gi_GTP in Cell_body = 0;
  species Gi_Gbc in Cell_body = 15;
  species BasalAC_Cell_body in Cell_body = 0;
  species ActAC5 in Cell_body;
  species AC5sub0 in Cell_body = 0.14;
  species AC5sub1 in Cell_body = 0.14;
  species Golf_bound_AC5 in Cell_body;
  species AC5sub1_Golf_GDP in Cell_body = 0;
  species AC5sub1_Golf_GTP in Cell_body = 0;
  species AC5sub2 in Cell_body = 0.14;
  species Gi_unbound_AC5 in Cell_body = 0;
  species AC5sub2_Gi_GDP in Cell_body = 0;
  species AC5sub2_Gi_GTP in Cell_body = 0;
  species ActAC1 in Cell_body;
  species ACsub0 in Cell_body = 2.004;
  species ACsub1 in Cell_body = 2.004;
  species Golf_bound_AC in Cell_body;
  species ACsub1_Golf_GDP in Cell_body = 0;
  species ACsub1_Golf_GTP in Cell_body = 0;
  species ACsub2 in Cell_body = 2.004;
  species Gi_unbound_AC in Cell_body;
  species ACsub2_Gi_GDP in Cell_body = 0;
  species ACsub2_Gi_GTP in Cell_body = 0;
  species ActiveAC in Cell_body;
  species RGS in Cell_body = 3.99;
  species ACsub3 in Cell_body = 2.004;
  species $Ca_ext in Cell_body = 1;
  species Ca in Cell_body = 0;
  species CaPump in Cell_body = 1.2;
  species ACsub_CaM in Cell_body = 2.004;
  species N0C0 in Cell_body = 100;
  species N1C0 in Cell_body = 0;
  species N2C0 in Cell_body = 0;
  species N0C1 in Cell_body = 0;
  species N0C2 in Cell_body = 0;
  species N1C1 in Cell_body = 0;
  species N1C2 in Cell_body = 0;
  species N2C1 in Cell_body = 0;
  species N2C2 in Cell_body = 0;
  species AC_CaM in Cell_body;
  species AC1_N0C0 in Cell_body = 0;
  species AC1_N1C0 in Cell_body = 0;
  species AC1_N2C0 in Cell_body = 0;
  species AC1_N0C1 in Cell_body = 0;
  species AC1_N0C2 in Cell_body = 0;
  species AC1_N1C1 in Cell_body = 0;
  species AC1_N1C2 in Cell_body = 0;
  species AC1_N2C1 in Cell_body = 0;
  species AC1_N2C2 in Cell_body = 0;
  species AC2_N0C0 in Cell_body = 0;
  species AC2_N1C0 in Cell_body = 0;
  species AC2_N2C0 in Cell_body = 0;
  species AC2_N0C1 in Cell_body = 0;
  species AC2_N0C2 in Cell_body = 0;
  species AC2_N1C1 in Cell_body = 0;
  species AC2_N1C2 in Cell_body = 0;
  species AC2_N2C1 in Cell_body = 0;
  species AC2_N2C2 in Cell_body = 0;
  species AC3_N0C0 in Cell_body = 0;
  species AC3_N1C0 in Cell_body = 0;
  species AC3_N2C0 in Cell_body = 0;
  species AC3_N0C1 in Cell_body = 0;
  species AC3_N0C2 in Cell_body = 0;
  species AC3_N1C1 in Cell_body = 0;
  species AC3_N1C2 in Cell_body = 0;
  species AC3_N2C1 in Cell_body = 0;
  species AC3_N2C2 in Cell_body = 0;
  species CB in Cell_body = 120;
  species Ca_CB in Cell_body = 0;
  species R2C2 in Cell_body = 4;
  species R2C2cAMP in Cell_body = 0;
  species R2C2cAMP2 in Cell_body = 0;
  species R2C2cAMP3 in Cell_body = 0;
  species R2C2cAMP4 in Cell_body = 0;
  species R2C1cAMP4 in Cell_body = 0;
  species R2C0cAMP4 in Cell_body = 1;
  species Ct in Cell_body = 0;
  species PP1 in Cell_body = 2;
  species D in Cell_body = 50;
  species D34p in Cell_body = 0;
  species PP2B in Cell_body = 1;
  species D_PP1 in Cell_body = 0;
  species D34p_PP1 in Cell_body = 0;
  species D34p_tot in Cell_body;
  species VGCC in Cell_body = 0;
  species VGCCplus in Cell_body = 2.001;
  species $VGCC_dummy in Cell_body = 0;
  species Epac in Cell_body = 1;
  species $Epac_cAMP in Cell_body;
  species Kd_Epac in Cell_body = 11;
  species SVR in Cell_body = 30;
  species CK in Cell_body = 40;
  species CK_N1C2 in Cell_body = 0;
  species CK_N2C2 in Cell_body = 0;
  species CK_N2C1 in Cell_body = 0;
  species CKp in Cell_body = 0;
  species CKp_N2C1 in Cell_body = 0;
  species CKp_N2C2 in Cell_body = 0;
  species CKp_N1C2 in Cell_body = 0;
  species TotalCK in Cell_body;
  species ActiveCK in Cell_body;
  species ActiveRatio in Cell_body;
  species ActivationFactor in Cell_body;

  // Parameters:
  Zero = 0;
  DApulse = 10;
  kdec_DA = 50;
  kinc_DA = 50;
  kon_DA_BuffDA = 0;
  koff_DA_BuffDA = 0;
  kf_DA_D1R = 24;
  kb_DA_D1R = 50;
  kf_DA_D2R = 10;
  kb_DA_D2R = 100;
  Km_exch_Golf = 2;
  kcat_exch_Golf = 66.667;
  kcat_exch_Golf_A2AR = 80;
  kcat_hyd_Golf = 50;
  kon_AC_GolfGTP = 40;
  koff_AC_GolfGTP = 4;
  kon_AC_GolfGDP = 40;
  koff_AC_GolfGDP = 40;
  kon_AC5_GolfGTP = 10;
  koff_AC5_GolfGTP = 1;
  kon_AC5_GolfGDP = 10;
  koff_AC5_GolfGDP = 10;
  kon_Gbc_Golf = 10;
  Km_exch_Gi = 0.2;
  kcat_exch_Gi = 800;
  Km_hyd_Gi = 12;
  kcat_hyd_Gi = 72;
  kon_AC_GiGTP = 40;
  koff_AC_GiGTP = 2;
  kon_AC_GiGDP = 8;
  koff_AC_GiGDP = 20;
  kon_AC5_GiGTP = 20;
  koff_AC5_GiGTP = 1;
  kon_AC5_GiGDP = 2;
  koff_AC5_GiGDP = 5;
  kon_Gbc_Gi = 10;
  Km_PDE = 0.05;
  kcat_PDE = 0.3;
  kon_A = 2;
  koff_A = 10;
  kon_C = 10;
  koff_C = 40;
  BasalAC = 0.01;
  kcat_T34P = 5;
  Km_T34P = 2.4;
  kcat_T34DP = 0.5;
  Km_T34DP = 1.6;
  kon_D32p_PP1 = 2;
  koff_D32p_PP1 = 0.01;
  koff_D32_PP1 = 0.5;
  kon_CK_CaM = 50;
  koff_CK_CaM = 10;
  kon_CKp_CaM = 50;
  koff_CKp_CaM = 0.001;
  tmpCK_Rate = 20;
  var tmpCK;
  leakCKp = 0;
  kcat_PP1 = 10;
  Km_PP1 = 10;
  CtSd = 1;
  kpump_Ca = 1600;
  kon_CB = 75;
  koff_CB = 29.5;
  kdeact_VGCC = 33.35;
  kinflux_Ca = 2500;
  kcat_decomp = 0.33;
  Km_decomp = 0.05;
  kcat_synth = 100;
  Km_synth = 1;
  Km_AC = 0.1;
  kcat_AC = 100;
  kon_AC_CaM = 50;
  koff_AC_CaM = 20;
  kup_AC = 4;
  kdown_AC = 4;
  kon_AC_CaM_g = 0.1435;
  kon_AC_CaM_g_b2 = 0.014924;
  kon_AC_CaM_g_b2_b1 = 2.38784e-5;
  kon_AC_CaM_b2_b1 = 0.000832;
  kon_AC_CaM_b2 = 0.52;
  kon_T_C = 84;
  kon_T_N = 770;
  koff_T_N = 160000;
  kon_R_C = 25;
  kon_R_N = 32000;
  koff_R_N = 22000;
  koff_T_C = 2600;
  koff_R_C = 6.5;
  koff_R_N_g = 631.4;
  koff_T_C_b1 = 4.16;
  koff_R_C_b2 = 0.676;
  kon_Epac_cAMP = 0.022;
  koff_Epac_cAMP = 10;
  _2kon_T_C = 168;
  _2koff_T_C = 5200;
  _2kon_T_N = 1540;
  _2koff_T_N = 320000;
  _2kon_R_C = 50;
  _2koff_R_C = 13;
  _2kon_R_N = 64000;
  _2koff_R_N = 44000;
  _2koff_R_N_g = 1262.8;
  _2koff_T_C_b1 = 8.32;
  _2koff_R_C_b2 = 1.352;
  _2kon_C = 20;
  _2koff_C = 80;
  _2kon_A = 4;
  _2koff_A = 20;
  _4kon_A = 8;
  _4koff_A = 40;
  _10kon_A = 20;
  _10koff_A = 100;
  _16kon_A = 32;
  _16koff_A = 160;
  Toffset_VGCC = 1910;
  Toffset_DA = 1910;

  // Assignment rules:
  Epac_cAMP := Epac*cAMP/(Kd_Epac + cAMP);
  D34p_tot := D34p_PP1 + D34p;
  AC_CaM := AC3_N0C0 + AC3_N0C1 + AC3_N0C2 + AC3_N1C0 + AC3_N1C1 + AC3_N1C2 + AC3_N2C0 + AC3_N2C1 + AC3_N2C2;
  Golf_bound_AC := ACsub1_Golf_GTP + ACsub1_Golf_GDP;
  Gi_unbound_AC := ACsub0 - (ACsub2_Gi_GTP + ACsub2_Gi_GDP);
  ActAC1 := Gi_unbound_AC/ACsub0*(Golf_bound_AC/ACsub0)*AC_CaM;
  Golf_bound_AC5 := AC5sub1_Golf_GTP + AC5sub1_Golf_GDP;
  ActAC5 := Golf_bound_AC5;
  ActiveAC := ActAC1 + ActAC5 + BasalAC_Cell_body;
  AllGi := Gi_Gbc + Gi_GTP + Gi_GDP + ACsub2_Gi_GTP + ACsub2_Gi_GDP;
  AllGolf := Golf_Gbc + Golf_GTP + Golf_GDP + ACsub1_Golf_GTP + ACsub1_Golf_GDP;
  TotalCK := CK + CKp + CK_N1C2 + CK_N2C1 + CK_N2C2 + CKp_N1C2 + CKp_N2C1 + CKp_N2C2;
  ActiveCK := CKp + CK_N1C2 + CK_N2C1 + CK_N2C2 + CKp_N1C2 + CKp_N2C1 + CKp_N2C2;
  ActiveRatio := ActiveCK/TotalCK;
  ActivationFactor := -0.22 + 1.826*ActiveRatio - 0.8*ActiveRatio*ActiveRatio;
  tmpCK := tmpCK_Rate*ActivationFactor*(ActivationFactor > 0);

  // Reactions:
  reaction_243: $ATP => cAMP; kcat_AC*ATP*ActiveAC/(Km_AC + ATP);
  reaction_244: cAMP => AMP; kcat_PDE*cAMP*PDE/(Km_PDE + cAMP);
  reaction_245: DA -> $DA_basal; kdec_DA*DA - kinc_DA*DA_basal;
  reaction_246: DA -> BuffDA; kon_DA_BuffDA*DA - koff_DA_BuffDA*BuffDA;
  reaction_247: DA + D1R -> DA_D1R; kf_DA_D1R*DA*D1R - kb_DA_D1R*DA_D1R;
  reaction_248: Golf_GDP + Gbc -> Golf_Gbc; kon_Gbc_Golf*Golf_GDP*Gbc - Zero*Golf_Gbc;
  reaction_249: Golf_Gbc => Gbc + Golf_GTP; kcat_exch_Golf*Golf_Gbc*DA_D1R/(Km_exch_Golf + Golf_Gbc);
  reaction_250: Golf_Gbc => Gbc + Golf_GTP; kcat_exch_Golf_A2AR*Golf_Gbc*A2AR/(Km_exch_Golf + Golf_Gbc);
  reaction_251: Golf_GTP => Golf_GDP; kcat_hyd_Golf*Golf_GTP;
  reaction_252: DA + D2R -> DA_D2R; kf_DA_D2R*DA*D2R - kb_DA_D2R*DA_D2R;
  reaction_253: Gi_GDP + Gbc -> Gi_Gbc; kon_Gbc_Gi*Gi_GDP*Gbc - Zero*Gi_Gbc;
  reaction_254: Gi_Gbc => Gbc + Gi_GTP; kcat_exch_Gi*Gi_Gbc*DA_D2R/(Km_exch_Gi + Gi_Gbc);
  reaction_255: Gi_GTP => Gi_GDP; kcat_hyd_Gi*Gi_GTP*RGS/(Km_hyd_Gi + Gi_GTP);
  reaction_256: Golf_GTP + ACsub1 -> ACsub1_Golf_GTP; kon_AC_GolfGTP*Golf_GTP*ACsub1 - koff_AC_GolfGTP*ACsub1_Golf_GTP;
  reaction_257: ACsub1_Golf_GDP -> ACsub1 + Golf_GDP; koff_AC_GolfGDP*ACsub1_Golf_GDP - kon_AC_GolfGDP*ACsub1*Golf_GDP;
  reaction_258: ACsub1_Golf_GTP => ACsub1_Golf_GDP; kcat_hyd_Golf*ACsub1_Golf_GTP;
  reaction_259: Gi_GTP + ACsub2 -> ACsub2_Gi_GTP; kon_AC_GiGTP*Gi_GTP*ACsub2 - koff_AC_GiGTP*ACsub2_Gi_GTP;
  reaction_260: ACsub2_Gi_GDP -> ACsub2 + Gi_GDP; koff_AC_GiGDP*ACsub2_Gi_GDP - kon_AC_GiGDP*ACsub2*Gi_GDP;
  reaction_261: ACsub2_Gi_GTP => ACsub2_Gi_GDP; kcat_hyd_Gi*ACsub2_Gi_GTP*RGS/(Km_hyd_Gi + ACsub2_Gi_GTP);
  reaction_262: Golf_GTP + AC5sub1 -> AC5sub1_Golf_GTP; kon_AC5_GolfGTP*Golf_GTP*AC5sub1 - koff_AC5_GolfGTP*AC5sub1_Golf_GTP;
  reaction_263: AC5sub1_Golf_GDP -> AC5sub1 + Golf_GDP; koff_AC5_GolfGDP*AC5sub1_Golf_GDP - kon_AC5_GolfGDP*AC5sub1*Golf_GDP;
  reaction_264: AC5sub1_Golf_GTP => AC5sub1_Golf_GDP; kcat_hyd_Golf*AC5sub1_Golf_GTP;
  reaction_265: R2C2 + cAMP -> R2C2cAMP; kon_A*R2C2*cAMP - _16koff_A*R2C2cAMP;
  reaction_266: R2C2cAMP + cAMP -> R2C2cAMP2; kon_A*R2C2cAMP*cAMP - _4koff_A*R2C2cAMP2;
  reaction_267: R2C2cAMP2 + cAMP -> R2C2cAMP3; _4kon_A*R2C2cAMP2*cAMP - koff_A*R2C2cAMP3;
  reaction_268: R2C2cAMP3 + cAMP -> R2C2cAMP4; _16kon_A*R2C2cAMP3*cAMP - koff_A*R2C2cAMP4;
  reaction_269: R2C2cAMP4 -> Ct + R2C1cAMP4; _2koff_C*R2C2cAMP4 - kon_C*Ct*R2C1cAMP4;
  reaction_270: R2C1cAMP4 -> Ct + R2C0cAMP4; koff_C*R2C1cAMP4 - _2kon_C*Ct*R2C0cAMP4;
  reaction_271: D34p => D; kcat_T34DP*D34p*PP2B/(Km_T34DP + D34p);
  reaction_272: D => D34p; kcat_T34P*D*Ct/(Km_T34P + D);
  reaction_273: D34p_PP1 => D_PP1; kcat_T34DP*D34p_PP1*PP2B/(Km_T34DP + D34p_PP1);
  reaction_274: D_PP1 => D34p_PP1; kcat_T34P*D_PP1*Ct/(Km_T34P + D_PP1);
  reaction_275: D34p + PP1 -> D34p_PP1; kon_D32p_PP1*D34p*PP1 - koff_D32p_PP1*D34p_PP1;
  reaction_276: D_PP1 -> D + PP1; koff_D32_PP1*D_PP1 - Zero*D*PP1;
  reaction_277: CK_N1C2 + Ca -> CK_N2C2; kon_R_N*CK_N1C2*Ca - _2koff_R_N*CK_N2C2;
  reaction_278: CK_N2C1 + Ca -> CK_N2C2; kon_R_C*CK_N2C1*Ca - _2koff_R_C*CK_N2C2;
  reaction_279: CKp_N1C2 + Ca -> CKp_N2C2; kon_R_N*CKp_N1C2*Ca - _2koff_R_N*CKp_N2C2;
  reaction_280: CKp_N2C1 + Ca -> CKp_N2C2; kon_R_C*CKp_N2C1*Ca - _2koff_R_C*CKp_N2C2;
  reaction_281: CKp => CK; kcat_PP1*CKp*PP1/(Km_PP1 + CKp);
  reaction_282: CKp_N1C2 => CK_N1C2; kcat_PP1*CKp_N1C2*PP1/(Km_PP1 + CKp_N1C2);
  reaction_283: CKp_N2C1 => CK_N2C1; kcat_PP1*CKp_N2C1*PP1/(Km_PP1 + CKp_N2C1);
  reaction_284: CKp_N2C2 => CK_N2C2; kcat_PP1*CKp_N2C2*PP1/(Km_PP1 + CKp_N2C2);
  reaction_285: N2C2 + CK -> CK_N2C2; kon_CK_CaM*N2C2*CK - koff_CK_CaM*CK_N2C2;
  reaction_286: N2C1 + CK -> CK_N2C1; kon_CK_CaM*N2C1*CK - koff_CK_CaM*CK_N2C1;
  reaction_287: N1C2 + CK -> CK_N1C2; kon_CK_CaM*N1C2*CK - koff_CK_CaM*CK_N1C2;
  reaction_288: CKp + N1C2 -> CKp_N1C2; kon_CKp_CaM*CKp*N1C2 - koff_CKp_CaM*CKp_N1C2;
  reaction_289: CKp + N2C1 -> CKp_N2C1; kon_CKp_CaM*CKp*N2C1 - koff_CKp_CaM*CKp_N2C1;
  reaction_290: CKp + N2C2 -> CKp_N2C2; kon_CKp_CaM*CKp*N2C2 - koff_CKp_CaM*CKp_N2C2;
  reaction_291: CK_N1C2 => CKp_N1C2; tmpCK*CK_N1C2;
  reaction_292: CK_N2C2 => CKp_N2C2; tmpCK*CK_N2C2;
  reaction_293: CK_N2C1 => CKp_N2C1; tmpCK*CK_N2C1;
  reaction_294: CK => CKp; leakCKp*CK;
  reaction_295: CB + Ca -> Ca_CB; kon_CB*CB*Ca - koff_CB*Ca_CB;
  reaction_296: Ca => $Ca_ext; kpump_Ca*Ca*CaPump;
  reaction_297: $Ca_ext => Ca; kinflux_Ca*Ca_ext*VGCC;
  reaction_298: VGCC => $VGCC_dummy; kdeact_VGCC*VGCC;
  reaction_299: N0C0 + Ca -> N1C0; _2kon_T_N*N0C0*Ca - koff_T_N*N1C0;
  reaction_300: N1C0 + Ca -> N2C0; kon_R_N*N1C0*Ca - _2koff_R_N*N2C0;
  reaction_301: N0C0 + Ca -> N0C1; _2kon_T_C*N0C0*Ca - koff_T_C*N0C1;
  reaction_302: N0C1 + Ca -> N0C2; kon_R_C*N0C1*Ca - _2koff_R_C*N0C2;
  reaction_303: N1C0 + Ca -> N1C1; _2kon_T_C*N1C0*Ca - koff_T_C*N1C1;
  reaction_304: N0C1 + Ca -> N1C1; _2kon_T_N*N0C1*Ca - koff_T_N*N1C1;
  reaction_305: N1C1 + Ca -> N2C1; kon_R_N*N1C1*Ca - _2koff_R_N*N2C1;
  reaction_306: N1C1 + Ca -> N1C2; kon_R_C*N1C1*Ca - _2koff_R_C*N1C2;
  reaction_307: N0C2 + Ca -> N1C2; _2kon_T_N*N0C2*Ca - koff_T_N*N1C2;
  reaction_308: N2C0 + Ca -> N2C1; _2kon_T_C*N2C0*Ca - koff_T_C*N2C1;
  reaction_309: N1C2 + Ca -> N2C2; kon_R_N*N1C2*Ca - _2koff_R_N*N2C2;
  reaction_310: N2C1 + Ca -> N2C2; kon_R_C*N2C1*Ca - _2koff_R_C*N2C2;
  reaction_311: N0C0 + ACsub3 -> AC1_N0C0; kon_AC_CaM_g_b2_b1*N0C0*ACsub3 - koff_AC_CaM*AC1_N0C0;
  reaction_312: N0C1 + ACsub3 -> AC1_N0C1; kon_AC_CaM_g_b2*N0C1*ACsub3 - koff_AC_CaM*AC1_N0C1;
  reaction_313: N0C2 + ACsub3 -> AC1_N0C2; kon_AC_CaM_g*N0C2*ACsub3 - koff_AC_CaM*AC1_N0C2;
  reaction_314: N1C0 + ACsub3 -> AC1_N1C0; kon_AC_CaM_g_b2_b1*N1C0*ACsub3 - koff_AC_CaM*AC1_N1C0;
  reaction_315: N1C1 + ACsub3 -> AC1_N1C1; kon_AC_CaM_g_b2*N1C1*ACsub3 - koff_AC_CaM*AC1_N1C1;
  reaction_316: N1C2 + ACsub3 -> AC1_N1C2; kon_AC_CaM_g*N1C2*ACsub3 - koff_AC_CaM*AC1_N1C2;
  reaction_317: N2C0 + ACsub3 -> AC1_N2C0; kon_AC_CaM_b2_b1*N2C0*ACsub3 - koff_AC_CaM*AC1_N2C0;
  reaction_318: N2C1 + ACsub3 -> AC1_N2C1; kon_AC_CaM_b2*N2C1*ACsub3 - koff_AC_CaM*AC1_N2C1;
  reaction_319: N2C2 + ACsub3 -> AC1_N2C2; kon_AC_CaM*N2C2*ACsub3 - koff_AC_CaM*AC1_N2C2;
  reaction_320: AC1_N0C0 + Ca -> AC1_N1C0; _2kon_T_N*AC1_N0C0*Ca - koff_T_N*AC1_N1C0;
  reaction_321: AC1_N1C0 + Ca -> AC1_N2C0; kon_R_N*AC1_N1C0*Ca - _2koff_R_N_g*AC1_N2C0;
  reaction_322: AC1_N0C0 + Ca -> AC1_N0C1; _2kon_T_C*AC1_N0C0*Ca - koff_T_C_b1*AC1_N0C1;
  reaction_323: AC1_N0C1 + Ca -> AC1_N0C2; kon_R_C*AC1_N0C1*Ca - _2koff_R_C_b2*AC1_N0C2;
  reaction_324: AC1_N1C0 + Ca -> AC1_N1C1; _2kon_T_C*AC1_N1C0*Ca - koff_T_C_b1*AC1_N1C1;
  reaction_325: AC1_N0C1 + Ca -> AC1_N1C1; _2kon_T_N*AC1_N0C1*Ca - koff_T_N*AC1_N1C1;
  reaction_326: AC1_N1C1 + Ca -> AC1_N2C1; kon_R_N*AC1_N1C1*Ca - _2koff_R_N_g*AC1_N2C1;
  reaction_327: AC1_N1C1 + Ca -> AC1_N1C2; kon_R_C*AC1_N1C1*Ca - _2koff_R_C_b2*AC1_N1C2;
  reaction_328: AC1_N0C2 + Ca -> AC1_N1C2; _2kon_T_N*AC1_N0C2*Ca - koff_T_N*AC1_N1C2;
  reaction_329: AC1_N2C0 + Ca -> AC1_N2C1; _2kon_T_C*AC1_N2C0*Ca - koff_T_C_b1*AC1_N2C1;
  reaction_330: AC1_N1C2 + Ca -> AC1_N2C2; kon_R_N*AC1_N1C2*Ca - _2koff_R_N_g*AC1_N2C2;
  reaction_331: AC1_N2C1 + Ca -> AC1_N2C2; kon_R_C*AC1_N2C1*Ca - _2koff_R_C_b2*AC1_N2C2;
  reaction_332: AC1_N0C0 -> AC2_N0C0; kup_AC*AC1_N0C0 - kdown_AC*AC2_N0C0;
  reaction_333: AC1_N0C1 -> AC2_N0C1; kup_AC*AC1_N0C1 - kdown_AC*AC2_N0C1;
  reaction_334: AC1_N0C2 -> AC2_N0C2; kup_AC*AC1_N0C2 - kdown_AC*AC2_N0C2;
  reaction_335: AC1_N1C0 -> AC2_N1C0; kup_AC*AC1_N1C0 - kdown_AC*AC2_N1C0;
  reaction_336: AC1_N1C1 -> AC2_N1C1; kup_AC*AC1_N1C1 - kdown_AC*AC2_N1C1;
  reaction_337: AC1_N1C2 -> AC2_N1C2; kup_AC*AC1_N1C2 - kdown_AC*AC2_N1C2;
  reaction_338: AC1_N2C0 -> AC2_N2C0; kup_AC*AC1_N2C0 - kdown_AC*AC2_N2C0;
  reaction_339: AC1_N2C1 -> AC2_N2C1; kup_AC*AC1_N2C1 - kdown_AC*AC2_N2C1;
  reaction_340: AC1_N2C2 -> AC2_N2C2; kup_AC*AC1_N2C2 - kdown_AC*AC2_N2C2;
  reaction_341: AC2_N0C0 + Ca -> AC2_N1C0; _2kon_T_N*AC2_N0C0*Ca - koff_T_N*AC2_N1C0;
  reaction_342: AC2_N1C0 + Ca -> AC2_N2C0; kon_R_N*AC2_N1C0*Ca - _2koff_R_N_g*AC2_N2C0;
  reaction_343: AC2_N0C0 + Ca -> AC2_N0C1; _2kon_T_C*AC2_N0C0*Ca - koff_T_C_b1*AC2_N0C1;
  reaction_344: AC2_N0C1 + Ca -> AC2_N0C2; kon_R_C*AC2_N0C1*Ca - _2koff_R_C_b2*AC2_N0C2;
  reaction_345: AC2_N1C0 + Ca -> AC2_N1C1; _2kon_T_C*AC2_N1C0*Ca - koff_T_C_b1*AC2_N1C1;
  reaction_346: AC2_N0C1 + Ca -> AC2_N1C1; _2kon_T_N*AC2_N0C1*Ca - koff_T_N*AC2_N1C1;
  reaction_347: AC2_N1C1 + Ca -> AC2_N2C1; kon_R_N*AC2_N1C1*Ca - _2koff_R_N_g*AC2_N2C1;
  reaction_348: AC2_N1C1 + Ca -> AC2_N1C2; kon_R_C*AC2_N1C1*Ca - _2koff_R_C_b2*AC2_N1C2;
  reaction_349: AC2_N0C2 + Ca -> AC2_N1C2; _2kon_T_N*AC2_N0C2*Ca - koff_T_N*AC2_N1C2;
  reaction_350: AC2_N2C0 + Ca -> AC2_N2C1; _2kon_T_C*AC2_N2C0*Ca - koff_T_C_b1*AC2_N2C1;
  reaction_351: AC2_N1C2 + Ca -> AC2_N2C2; kon_R_N*AC2_N1C2*Ca - _2koff_R_N_g*AC2_N2C2;
  reaction_352: AC2_N2C1 + Ca -> AC2_N2C2; kon_R_C*AC2_N2C1*Ca - _2koff_R_C_b2*AC2_N2C2;
  reaction_353: AC2_N0C0 -> AC3_N0C0; kup_AC*AC2_N0C0 - kdown_AC*AC3_N0C0;
  reaction_354: AC2_N0C1 -> AC3_N0C1; kup_AC*AC2_N0C1 - kdown_AC*AC3_N0C1;
  reaction_355: AC2_N0C2 -> AC3_N0C2; kup_AC*AC2_N0C2 - kdown_AC*AC3_N0C2;
  reaction_356: AC2_N1C0 -> AC3_N1C0; kup_AC*AC2_N1C0 - kdown_AC*AC3_N1C0;
  reaction_357: AC2_N1C1 -> AC3_N1C1; kup_AC*AC2_N1C1 - kdown_AC*AC3_N1C1;
  reaction_358: AC2_N1C2 -> AC3_N1C2; kup_AC*AC2_N1C2 - kdown_AC*AC3_N1C2;
  reaction_359: AC2_N2C0 -> AC3_N2C0; kup_AC*AC2_N2C0 - kdown_AC*AC3_N2C0;
  reaction_360: AC2_N2C1 -> AC3_N2C1; kup_AC*AC2_N2C1 - kdown_AC*AC3_N2C1;
  reaction_361: AC2_N2C2 -> AC3_N2C2; kup_AC*AC2_N2C2 - kdown_AC*AC3_N2C2;
  reaction_362: AC3_N0C0 + Ca -> AC3_N1C0; _2kon_T_N*AC3_N0C0*Ca - koff_T_N*AC3_N1C0;
  reaction_363: AC3_N1C0 + Ca -> AC3_N2C0; kon_R_N*AC3_N1C0*Ca - _2koff_R_N_g*AC3_N2C0;
  reaction_364: AC3_N0C0 + Ca -> AC3_N0C1; _2kon_T_C*AC3_N0C0*Ca - koff_T_C_b1*AC3_N0C1;
  reaction_365: AC3_N0C1 + Ca -> AC3_N0C2; kon_R_C*AC3_N0C1*Ca - _2koff_R_C_b2*AC3_N0C2;
  reaction_366: AC3_N1C0 + Ca -> AC3_N1C1; _2kon_T_C*AC3_N1C0*Ca - koff_T_C_b1*AC3_N1C1;
  reaction_367: AC3_N0C1 + Ca -> AC3_N1C1; _2kon_T_N*AC3_N0C1*Ca - koff_T_N*AC3_N1C1;
  reaction_368: AC3_N1C1 + Ca -> AC3_N2C1; kon_R_N*AC3_N1C1*Ca - _2koff_R_N_g*AC3_N2C1;
  reaction_369: AC3_N1C1 + Ca -> AC3_N1C2; kon_R_C*AC3_N1C1*Ca - _2koff_R_C_b2*AC3_N1C2;
  reaction_370: AC3_N0C2 + Ca -> AC3_N1C2; _2kon_T_N*AC3_N0C2*Ca - koff_T_N*AC3_N1C2;
  reaction_371: AC3_N2C0 + Ca -> AC3_N2C1; _2kon_T_C*AC3_N2C0*Ca - koff_T_C_b1*AC3_N2C1;
  reaction_372: AC3_N1C2 + Ca -> AC3_N2C2; kon_R_N*AC3_N1C2*Ca - _2koff_R_N_g*AC3_N2C2;
  reaction_373: AC3_N2C1 + Ca -> AC3_N2C2; kon_R_C*AC3_N2C1*Ca - _2koff_R_C_b2*AC3_N2C2;

  // Events:
  event_374: at (time >= 500): cAMP = 0;
  event_375: at (time >= 600): cAMP = 0;
  event_376: at (time >= 700): cAMP = 0;
  event_377: at (time >= 800): cAMP = 0;
  event_378: at (time >= 900): cAMP = 0;
  event_379: at (time >= 1000): cAMP = 0;
  event_380: at (time >= 1100): cAMP = 0;
  event_381: at (time >= Toffset_VGCC): VGCC = VGCC + VGCCplus;
  event_382: at (time >= Toffset_VGCC + 0.1): VGCC = VGCC + VGCCplus;
  event_383: at (time >= Toffset_VGCC + 0.2): VGCC = VGCC + VGCCplus;
  event_384: at (time >= Toffset_VGCC + 0.3): VGCC = VGCC + VGCCplus;
  event_385: at (time >= Toffset_VGCC + 0.4): VGCC = VGCC + VGCCplus;
  event_386: at (time >= Toffset_VGCC + 0.5): VGCC = VGCC + VGCCplus;
  event_387: at (time >= Toffset_VGCC + 0.6): VGCC = VGCC + VGCCplus;
  event_388: at (time >= Toffset_VGCC + 0.7): VGCC = VGCC + VGCCplus;
  event_389: at (time >= Toffset_VGCC + 0.8): VGCC = VGCC + VGCCplus;
  event_390: at (time >= Toffset_VGCC + 0.9): VGCC = VGCC + VGCCplus;
  event_391: at (time >= Toffset_DA + 0): DA = DA + DApulse;
  event_392: at (time >= Toffset_DA + 0.0333): DA = DA + DApulse;
  event_393: at (time >= Toffset_DA + 0.0666): DA = DA + DApulse;
  event_394: at (time >= Toffset_DA + 0.1): DA = DA + DApulse;
  event_395: at (time >= Toffset_DA + 0.1333): DA = DA + DApulse;
  event_396: at (time >= Toffset_DA + 0.1666): DA = DA + DApulse;
  event_397: at (time >= Toffset_DA + 0.2): DA = DA + DApulse;
  event_398: at (time >= Toffset_DA + 0.2333): DA = DA + DApulse;
  event_399: at (time >= Toffset_DA + 0.2666): DA = DA + DApulse;
  event_400: at (time >= Toffset_DA + 0.3): DA = DA + DApulse;
end
